# OpenSim document version 40500
Model Sue_Leg2:
  gravity: 0 0 0
  Ground
  BodySet:
    Body femur: mass=300 [kg] mass_center=(0 0 0) inertia=(42.45 1.215 42.45 0 0 0)
      Cylinder femur_geom_1: radius=0.09 half_height=0.65
    Body tibia: mass=180 mass_center=(0 0 0) inertia=(18.5 0.38 18.5 0 0 0)
      Cylinder tibia_geom_1: radius=0.065 half_height=0.55
      WrapSphere knee_front_wrap: translation=(-0.02 0.55 0) quadrant=all radius=0.09
    Body foot: mass=60 mass_center=(0 0 0) inertia=(0.192 1.896 1.896 0 0 0)
      Cylinder foot_geom_1: radius=0.08 half_height=0.3
  JointSet:
    WeldJoint ground_foot: socket_parent_frame=ground_offset socket_child_frame=foot_offset
      PhysicalOffsetFrame ground_offset: socket_parent=/ground translation=(0 0 0) [meters]
      PhysicalOffsetFrame foot_offset: socket_parent=/bodyset/foot translation=(0 0 0)
          orientation=(0 0 1.570796) [radians]
    CustomJoint foot_tibia: socket_parent_frame=foot_offset socket_child_frame=tibia_offset
      Coordinate foot_tibia_rz: range=(-0.5235988 0.5235988)
      PhysicalOffsetFrame foot_offset: socket_parent=/bodyset/foot translation=(0.2 0.08 0) orientation=(0 0 2.356194)
      PhysicalOffsetFrame tibia_offset: socket_parent=/bodyset/tibia translation=(-0.3 -0.55 0)
      SpatialTransform:
        TransformAxis rotation1: axis=(1 0 0)
        TransformAxis rotation2: axis=(0 1 0)
        TransformAxis rotation3: coordinates=foot_tibia_rz axis=(0 0 1) LinearFunction(coefficients=1 0)
        TransformAxis translation1: axis=(1 0 0)
        TransformAxis translation2: axis=(0 1 0)
        TransformAxis translation3: axis=(0 0 1)
    CustomJoint tibia_femur: socket_parent_frame=tibia_offset socket_child_frame=femur_offset
      Coordinate tibia_femur_rz: range=(-0.7853982 0.7853982)
      PhysicalOffsetFrame tibia_offset: socket_parent=/bodyset/tibia translation=(0 0.55 0) orientation=(0 0 -1.570796)
      PhysicalOffsetFrame femur_offset: socket_parent=/bodyset/femur translation=(0 -0.65 0)
      SpatialTransform:
        TransformAxis rotation1: axis=(1 0 0)
        TransformAxis rotation2: axis=(0 1 0)
        TransformAxis rotation3: coordinates=tibia_femur_rz axis=(0 0 1) LinearFunction(coefficients=1 0)
        TransformAxis translation1: axis=(1 0 0)
        TransformAxis translation2: axis=(0 1 0)
        TransformAxis translation3: axis=(0 0 1)
  ForceSet:
    Millard2012EquilibriumMuscle trex_flexor_tibia_medial: min_control=0.01 max_control=1 max_isometric_force=10000
        optimal_fiber_length=0.3 tendon_slack_length=0.7 pennation_angle_at_optimal=0 [radians]
        default_fiber_length=0.3
      PathPoint trex_flexor_tibia_medial_pt1: femur (-0.1 0.35 0)
      PathPoint trex_flexor_tibia_medial_pt2: femur (-0.1 -0.65 0)
      PathPoint trex_flexor_tibia_medial_pt3: tibia (-0.1 0.6 0)
      PathPoint trex_flexor_tibia_medial_pt4: tibia (-0.09 0.38 0)
      PathPoint trex_flexor_tibia_medial_pt5: tibia (-0.07 0.1 0.045)
      PathWrap: wrap_object=knee_front_wrap method=hybrid
      ActiveForceLengthCurve: minimum_value=0
      ForceVelocityCurve: concentric_slope_at_vmax=0 concentric_slope_near_vmax=0.25 isometric_slope=5
          eccentric_slope_at_vmax=0 eccentric_slope_near_vmax=0.15 max_eccentric_velocity_force_multiplier=1.4
      FiberForceLengthCurve
      TendonForceLengthCurve
    Millard2012EquilibriumMuscle trex_flexor_tibia_lateral: min_control=0.01 max_control=1 max_isometric_force=10000
        optimal_fiber_length=0.3 tendon_slack_length=0.7 pennation_angle_at_optimal=0 default_fiber_length=0.3
      PathPoint trex_flexor_tibia_lateral_pt1: femur (-0.1 0.35 0)
      PathPoint trex_flexor_tibia_lateral_pt2: femur (-0.1 -0.65 0)
      PathPoint trex_flexor_tibia_lateral_pt3: tibia (-0.1 0.6 0)
      PathPoint trex_flexor_tibia_lateral_pt4: tibia (-0.09 0.38 0)
      PathPoint trex_flexor_tibia_lateral_pt5: tibia (-0.07 0.1 -0.045)
      PathWrap: wrap_object=knee_front_wrap method=hybrid
      ActiveForceLengthCurve: minimum_value=0
      ForceVelocityCurve: concentric_slope_at_vmax=0 concentric_slope_near_vmax=0.25 isometric_slope=5
          eccentric_slope_at_vmax=0 eccentric_slope_near_vmax=0.15 max_eccentric_velocity_force_multiplier=1.4
      FiberForceLengthCurve
      TendonForceLengthCurve
    Millard2012EquilibriumMuscle trex_flexor_foot: min_control=0.01 max_control=1 max_isometric_force=10000
        optimal_fiber_length=0.3 tendon_slack_length=0.7 pennation_angle_at_optimal=0 default_fiber_length=0.3
      PathPoint trex_flexor_foot_pt1: femur (-0.1 0.35 0)
      PathPoint trex_flexor_foot_pt2: femur (-0.1 -0.65 0)
      PathPoint trex_flexor_foot_pt3: tibia (-0.1 0.6 0)
      PathPoint trex_flexor_foot_pt4: foot (-0.08 0.1 0)
      PathWrap: wrap_object=knee_front_wrap method=hybrid
      ActiveForceLengthCurve: minimum_value=0
      ForceVelocityCurve: concentric_slope_at_vmax=0 concentric_slope_near_vmax=0.25 isometric_slope=5
          eccentric_slope_at_vmax=0 eccentric_slope_near_vmax=0.15 max_eccentric_velocity_force_multiplier=1.4
      FiberForceLengthCurve
      TendonForceLengthCurve
