# OpenSim document version 40500
Model Sue_Leg2:
  gravity: 0 0 0
  Ground
  BodySet:
    Body femur: mass=300 [kg] mass_center=(0 0 0) inertia=(42.45 1.215 42.45 0 0 0)
      Cylinder femur_geom_1: radius=0.09 half_height=0.65
    Body tibia: mass=180 mass_center=(0 0 0) inertia=(18.5 0.38 18.5 0 0 0)
      Cylinder tibia_geom_1: radius=0.065 half_height=0.55
      WrapSphere knee_front_wrap: translation=(-0.02 0.55 0) quadrant=all radius=0.09
    Body foot: mass=60 mass_center=(0 0 0) inertia=(0.192 1.896 1.896 0 0 0)
      Cylinder foot_geom_1: radius=0.08 half_height=0.3
    Body float1: mass=0.005 mass_center=(0 0 0) inertia=(2e-7 2e-7 2e-7 0 0 0)
      Sphere float1_geom_1: radius=0.025
    Body float2: mass=0.005 mass_center=(0 0 0) inertia=(2e-7 2e-7 2e-7 0 0 0)
      Sphere float2_geom_1: radius=0.025
  JointSet:
    WeldJoint ground_foot: socket_parent_frame=ground_offset socket_child_frame=foot_offset
      PhysicalOffsetFrame ground_offset: socket_parent=/ground translation=(0 0 0) [meters]
      PhysicalOffsetFrame foot_offset: socket_parent=/bodyset/foot translation=(0 0 0)
          orientation=(0 0 1.570796) [radians]
    CustomJoint foot_tibia: socket_parent_frame=foot_offset socket_child_frame=tibia_offset
      Coordinate foot_tibia_rz: range=(-0.5235988 0.5235988)
      PhysicalOffsetFrame foot_offset: socket_parent=/bodyset/foot translation=(0.2 0.08 0) orientation=(0 0 2.356194)
      PhysicalOffsetFrame tibia_offset: socket_parent=/bodyset/tibia translation=(-0.3 -0.55 0)
      SpatialTransform:
        TransformAxis rotation1: axis=(1 0 0)
        TransformAxis rotation2: axis=(0 1 0)
        TransformAxis rotation3: coordinates=foot_tibia_rz axis=(0 0 1) LinearFunction(coefficients=1 0)
        TransformAxis translation1: axis=(1 0 0)
        TransformAxis translation2: axis=(0 1 0)
        TransformAxis translation3: axis=(0 0 1)
    CustomJoint tibia_femur: socket_parent_frame=tibia_offset socket_child_frame=femur_offset
      Coordinate tibia_femur_rz: range=(-0.7853982 0.7853982)
      PhysicalOffsetFrame tibia_offset: socket_parent=/bodyset/tibia translation=(0 0.55 0) orientation=(0 0 -1.570796)
      PhysicalOffsetFrame femur_offset: socket_parent=/bodyset/femur translation=(0 -0.65 0)
      SpatialTransform:
        TransformAxis rotation1: axis=(1 0 0)
        TransformAxis rotation2: axis=(0 1 0)
        TransformAxis rotation3: coordinates=tibia_femur_rz axis=(0 0 1) LinearFunction(coefficients=1 0)
        TransformAxis translation1: axis=(1 0 0)
        TransformAxis translation2: axis=(0 1 0)
        TransformAxis translation3: axis=(0 0 1)
    CustomJoint tibia_float1: socket_parent_frame=tibia_offset socket_child_frame=float1_offset
      Coordinate tibia_float1_ty
      PhysicalOffsetFrame tibia_offset: socket_parent=/bodyset/tibia translation=(-0.1 0.6 0)
      PhysicalOffsetFrame float1_offset: socket_parent=/bodyset/float1 translation=(0 0 0)
      SpatialTransform:
        TransformAxis rotation1: axis=(1 0 0)
        TransformAxis rotation2: axis=(0 1 0)
        TransformAxis rotation3: axis=(0 0 1)
        TransformAxis translation1: axis=(1 0 0)
        TransformAxis translation2: coordinates=tibia_float1_ty axis=(0 1 0) LinearFunction(coefficients=1 0)
        TransformAxis translation3: axis=(0 0 1)
    CustomJoint tibia_float2: socket_parent_frame=tibia_offset socket_child_frame=float2_offset
      Coordinate tibia_float2_ty
      PhysicalOffsetFrame tibia_offset: socket_parent=/bodyset/tibia translation=(-0.09 0.38 0)
      PhysicalOffsetFrame float2_offset: socket_parent=/bodyset/float2 translation=(0 0 0)
      SpatialTransform:
        TransformAxis rotation1: axis=(1 0 0)
        TransformAxis rotation2: axis=(0 1 0)
        TransformAxis rotation3: axis=(0 0 1)
        TransformAxis translation1: axis=(1 0 0)
        TransformAxis translation2: coordinates=tibia_float2_ty axis=(0 1 0) LinearFunction(coefficients=1 0)
        TransformAxis translation3: axis=(0 0 1)
  ForceSet:
    Millard2012EquilibriumMuscle trex_branch_group_MTU1: min_control=0.01 max_control=1 max_isometric_force=30000
        optimal_fiber_length=0.3 tendon_slack_length=0.5 pennation_angle_at_optimal=0 [radians]
        default_fiber_length=0.3
      PathPoint trex_branch_group_MTU1_pt1: femur (-0.1 0.35 0)
      PathPoint trex_branch_group_MTU1_pt2: femur (-0.1 -0.65 0)
      PathPoint trex_branch_group_MTU1_pt3: float1 (0 0 0)
      ActiveForceLengthCurve: minimum_value=0
      ForceVelocityCurve: concentric_slope_at_vmax=0 concentric_slope_near_vmax=0.25 isometric_slope=5
          eccentric_slope_at_vmax=0 eccentric_slope_near_vmax=0.15 max_eccentric_velocity_force_multiplier=1.4
      FiberForceLengthCurve
      TendonForceLengthCurve
    Ligament trex_branch_group_ligament1: resting_length=0.220227 pcsa_force=20000
      PathPoint trex_branch_group_ligament1_pt1: float1 (0 0 0)
      PathPoint trex_branch_group_ligament1_pt2: float2 (0 0 0)
      TendonForceLengthCurve force_length_curve
    Ligament trex_branch_group_ligament2: resting_length=0.966228 pcsa_force=10000
      PathPoint trex_branch_group_ligament2_pt1: float1 (0 0 0)
      PathPoint trex_branch_group_ligament2_pt2: foot (-0.08 0.1 0)
      TendonForceLengthCurve force_length_curve
    Ligament trex_branch_group_ligament3: resting_length=0.284297 pcsa_force=10000
      PathPoint trex_branch_group_ligament3_pt1: float2 (0 0 0)
      PathPoint trex_branch_group_ligament3_pt2: tibia (-0.07 0.1 0.045)
      PathWrap: wrap_object=knee_front_wrap method=hybrid
      TendonForceLengthCurve force_length_curve
    Ligament trex_branch_group_ligament4: resting_length=0.284297 pcsa_force=10000
      PathPoint trex_branch_group_ligament4_pt1: float2 (0 0 0)
      PathPoint trex_branch_group_ligament4_pt2: tibia (-0.07 0.1 -0.045)
      PathWrap: wrap_object=knee_front_wrap method=hybrid
      TendonForceLengthCurve force_length_curve
