# OpenSim document version 40500
Model Sue_Neck2:
  gravity: 0 0 0
  Ground
  BodySet:
    Body skull: mass=500 [kg] mass_center=(0 0 0) inertia=(30.625 96.979 96.979 0 0 0)
      Cylinder skull_geom_1: radius=0.35 half_height=0.7
    Body atlas_axis: mass=18 mass_center=(0 0 0) inertia=(0.292 0.232 0.232 0 0 0)
      Cylinder atlas_axis_geom_1: radius=0.18 half_height=0.12
      WrapSphere atlas_skull_wrap: translation=(0.12 0.17 0) quadrant=all radius=0.135
    Body anterior_cervical: mass=50 mass_center=(0 0 0) inertia=(0.81 1.447 1.447 0 0 0)
      Cylinder anterior_cervical_geom_1: radius=0.18 half_height=0.25
    Body middle_cervical: mass=75 mass_center=(0 0 0) inertia=(1.354 2.927 2.927 0 0 0)
      Cylinder middle_cervical_geom_1: radius=0.19 half_height=0.3
    Body posterior_cervical: mass=120 mass_center=(0 0 0) inertia=(2.4 7.6 7.6 0 0 0)
      Cylinder posterior_cervical_geom_1: radius=0.2 half_height=0.4
    Body first_dorsal: mass=150 mass_center=(0 0 0) inertia=(4.32 3.78 3.78 0 0 0)
      Cylinder first_dorsal_geom_1: radius=0.24 half_height=0.18
  JointSet:
    WeldJoint ground_first_dorsal: socket_parent_frame=ground_offset socket_child_frame=first_dorsal_offset
      PhysicalOffsetFrame ground_offset: socket_parent=/ground translation=(0 1 0) [meters]
          orientation=(0 0 1.570796) [radians]
      PhysicalOffsetFrame first_dorsal_offset: socket_parent=/bodyset/first_dorsal translation=(0 -0.18 0)
          orientation=(0 0 0.3490659)
    CustomJoint first_dorsal_posterior_cervical: socket_parent_frame=first_dorsal_offset
        socket_child_frame=posterior_cervical_offset
      Coordinate first_dorsal_posterior_cervical_rx: range=(-0.1396263 0.1396263)
      Coordinate first_dorsal_posterior_cervical_rz: range=(-0.2617994 0.2617994)
      PhysicalOffsetFrame first_dorsal_offset: socket_parent=/bodyset/first_dorsal translation=(0 0.18 0)
      PhysicalOffsetFrame posterior_cervical_offset: socket_parent=/bodyset/posterior_cervical translation=(0 -0.4 0)
      SpatialTransform:
        TransformAxis rotation1: coordinates=first_dorsal_posterior_cervical_rx axis=(1 0 0)
            LinearFunction(coefficients=1 0)
        TransformAxis rotation2: axis=(0 1 0)
        TransformAxis rotation3: coordinates=first_dorsal_posterior_cervical_rz axis=(0 0 1)
            LinearFunction(coefficients=1 0)
        TransformAxis translation1: axis=(1 0 0)
        TransformAxis translation2: axis=(0 1 0)
        TransformAxis translation3: axis=(0 0 1)
    CustomJoint posterior_cervical_middle_cervical: socket_parent_frame=posterior_cervical_offset
        socket_child_frame=middle_cervical_offset
      Coordinate posterior_cervical_middle_cervical_rx: range=(-0.1745329 0.1745329)
      PhysicalOffsetFrame posterior_cervical_offset: socket_parent=/bodyset/posterior_cervical translation=(0 0.4 0)
      PhysicalOffsetFrame middle_cervical_offset: socket_parent=/bodyset/middle_cervical translation=(0 -0.3 0)
      SpatialTransform:
        TransformAxis rotation1: coordinates=posterior_cervical_middle_cervical_rx axis=(1 0 0)
            LinearFunction(coefficients=1 0)
        TransformAxis rotation2: axis=(0 1 0)
        TransformAxis rotation3: axis=(0 0 1)
        TransformAxis translation1: axis=(1 0 0)
        TransformAxis translation2: axis=(0 1 0)
        TransformAxis translation3: axis=(0 0 1)
    CustomJoint middle_cervical_anterior_cervical: socket_parent_frame=middle_cervical_offset
        socket_child_frame=anterior_cervical_offset
      Coordinate middle_cervical_anterior_cervical_rx: range=(-0.2094395 0.2094395)
      PhysicalOffsetFrame middle_cervical_offset: socket_parent=/bodyset/middle_cervical translation=(0 0.3 0)
      PhysicalOffsetFrame anterior_cervical_offset: socket_parent=/bodyset/anterior_cervical translation=(0 -0.25 0)
      SpatialTransform:
        TransformAxis rotation1: coordinates=middle_cervical_anterior_cervical_rx axis=(1 0 0)
            LinearFunction(coefficients=1 0)
        TransformAxis rotation2: axis=(0 1 0)
        TransformAxis rotation3: axis=(0 0 1)
        TransformAxis translation1: axis=(1 0 0)
        TransformAxis translation2: axis=(0 1 0)
        TransformAxis translation3: axis=(0 0 1)
    CustomJoint anterior_cervical_atlas_axis: socket_parent_frame=anterior_cervical_offset
        socket_child_frame=atlas_axis_offset
      Coordinate anterior_cervical_atlas_axis_rx: range=(-0.2617994 0.2617994)
      Coordinate anterior_cervical_atlas_axis_rz: range=(-0.2617994 0.2617994)
      PhysicalOffsetFrame anterior_cervical_offset: socket_parent=/bodyset/anterior_cervical translation=(0 0.25 0)
      PhysicalOffsetFrame atlas_axis_offset: socket_parent=/bodyset/atlas_axis translation=(0 -0.12 0)
      SpatialTransform:
        TransformAxis rotation1: coordinates=anterior_cervical_atlas_axis_rx axis=(1 0 0)
            LinearFunction(coefficients=1 0)
        TransformAxis rotation2: axis=(0 1 0)
        TransformAxis rotation3: coordinates=anterior_cervical_atlas_axis_rz axis=(0 0 1)
            LinearFunction(coefficients=1 0)
        TransformAxis translation1: axis=(1 0 0)
        TransformAxis translation2: axis=(0 1 0)
        TransformAxis translation3: axis=(0 0 1)
    CustomJoint atlas_axis_skull: socket_parent_frame=atlas_axis_offset socket_child_frame=skull_offset
      Coordinate atlas_axis_skull_rx: range=(-0.3141593 0.3141593)
      PhysicalOffsetFrame atlas_axis_offset: socket_parent=/bodyset/atlas_axis translation=(0 0.12 0)
      PhysicalOffsetFrame skull_offset: socket_parent=/bodyset/skull translation=(0 -0.7 0)
          orientation=(0 0 -0.3490659)
      SpatialTransform:
        TransformAxis rotation1: coordinates=atlas_axis_skull_rx axis=(1 0 0) LinearFunction(coefficients=1 0)
        TransformAxis rotation2: axis=(0 1 0)
        TransformAxis rotation3: axis=(0 0 1)
        TransformAxis translation1: axis=(1 0 0)
        TransformAxis translation2: axis=(0 1 0)
        TransformAxis translation3: axis=(0 0 1)
  ForceSet:
    Millard2012EquilibriumMuscle trans_spinal_to_anterior_cervical: min_control=0.01 max_control=1
        max_isometric_force=2500 optimal_fiber_length=0.45 tendon_slack_length=0.18
        pennation_angle_at_optimal=0 [radians] default_fiber_length=0.45
      PathPoint trans_spinal_to_anterior_cervical_pt1: first_dorsal (0.26 -0.1 0)
      PathPoint trans_spinal_to_anterior_cervical_pt2: posterior_cervical (0.22 0 0)
      PathPoint trans_spinal_to_anterior_cervical_pt3: middle_cervical (0.2 0 0)
      PathPoint trans_spinal_to_anterior_cervical_pt4: anterior_cervical (0.2 0.05 0)
      ActiveForceLengthCurve: minimum_value=0
      ForceVelocityCurve: concentric_slope_at_vmax=0 concentric_slope_near_vmax=0.25 isometric_slope=5
          eccentric_slope_at_vmax=0 eccentric_slope_near_vmax=0.15 max_eccentric_velocity_force_multiplier=1.4
      FiberForceLengthCurve
      TendonForceLengthCurve
    Millard2012EquilibriumMuscle trans_spinal_to_atlas: min_control=0.01 max_control=1 max_isometric_force=2500
        optimal_fiber_length=0.45 tendon_slack_length=0.28 pennation_angle_at_optimal=0 default_fiber_length=0.45
      PathPoint trans_spinal_to_atlas_pt1: first_dorsal (0.26 -0.1 0)
      PathPoint trans_spinal_to_atlas_pt2: posterior_cervical (0.22 0 0)
      PathPoint trans_spinal_to_atlas_pt3: middle_cervical (0.21 0 0)
      PathPoint trans_spinal_to_atlas_pt4: anterior_cervical (0.2 0 0)
      PathPoint trans_spinal_to_atlas_pt5: atlas_axis (0.2 0 0)
      ActiveForceLengthCurve: minimum_value=0
      ForceVelocityCurve: concentric_slope_at_vmax=0 concentric_slope_near_vmax=0.25 isometric_slope=5
          eccentric_slope_at_vmax=0 eccentric_slope_near_vmax=0.15 max_eccentric_velocity_force_multiplier=1.4
      FiberForceLengthCurve
      TendonForceLengthCurve
    Millard2012EquilibriumMuscle trans_spinal_to_skull: min_control=0.01 max_control=1 max_isometric_force=2500
        optimal_fiber_length=0.45 tendon_slack_length=0.45 pennation_angle_at_optimal=0 default_fiber_length=0.45
      PathPoint trans_spinal_to_skull_pt1: first_dorsal (0.26 -0.1 0)
      PathPoint trans_spinal_to_skull_pt2: posterior_cervical (0.22 0 0)
      PathPoint trans_spinal_to_skull_pt3: middle_cervical (0.21 0 0)
      PathPoint trans_spinal_to_skull_pt4: anterior_cervical (0.2 0 0)
      PathPoint trans_spinal_to_skull_pt5: atlas_axis (0.2 0 0)
      PathPoint trans_spinal_to_skull_pt6: skull (0.28 -0.7 0)
      PathWrap: wrap_object=atlas_skull_wrap method=hybrid
      ActiveForceLengthCurve: minimum_value=0
      ForceVelocityCurve: concentric_slope_at_vmax=0 concentric_slope_near_vmax=0.25 isometric_slope=5
          eccentric_slope_at_vmax=0 eccentric_slope_near_vmax=0.15 max_eccentric_velocity_force_multiplier=1.4
      FiberForceLengthCurve
      TendonForceLengthCurve
